// SBML level 3 version 1

model model()

  // Compartments:
  compartment Compartment = 1;

  // Species:
  species prey in Compartment = 0.44249296/Compartment;
  species predator in Compartment = 4.6280594/Compartment;

  // Parameters:
  alpha_ = 1.3;
  beta_ = 0.9;
  gamma_ = 0.8;
  delta_ = 1.8;
  rhs_prey__mechanistic has dimensionless;
  rhs_prey__universal has dimensionless;
  rhs_predator__mechanistic has dimensionless;
  rhs_predator__universal has dimensionless;
  neural_network_nn1__layer_0__node__0__bias__ = 0 dimensionless;
  neural_network_nn1__layer_0__node__0__weight__predator = 0 dimensionless;
  neural_network_nn1__layer_0__node__0__weight__prey = 0 dimensionless;
  neural_network_nn1__layer_0__node__0__formula__ has dimensionless;
  neural_network_nn1__layer_0__node__1__bias__ = 0 dimensionless;
  neural_network_nn1__layer_0__node__1__weight__predator = 0 dimensionless;
  neural_network_nn1__layer_0__node__1__weight__prey = 0 dimensionless;
  neural_network_nn1__layer_0__node__1__formula__ has dimensionless;
  neural_network_nn1__layer_1__node__0__bias__ = 0 dimensionless;
  neural_network_nn1__layer_1__node__0__weight__neural_network_nn1__layer_0__node__0 = 0 dimensionless;
  neural_network_nn1__layer_1__node__0__weight__neural_network_nn1__layer_0__node__1 = 0 dimensionless;
  neural_network_nn1__layer_1__node__0__formula__ has dimensionless;
  neural_network_nn1__layer_1__node__1__bias__ = 0 dimensionless;
  neural_network_nn1__layer_1__node__1__weight__neural_network_nn1__layer_0__node__0 = 0 dimensionless;
  neural_network_nn1__layer_1__node__1__weight__neural_network_nn1__layer_0__node__1 = 0 dimensionless;
  neural_network_nn1__layer_1__node__1__formula__ has dimensionless;
  predator__U__neural_network_nn1__layer_1__node__0 has dimensionless;
  prey__U__neural_network_nn1__layer_1__node__1 has dimensionless;
  nUDE_universal_magnitude has dimensionless;
  nUDE_universal_integral = 0 dimensionless;

  // Assignment rules:
  prey_birth := alpha_*prey;
  prey_predation := -beta_*prey*predator;
  predator_predation := delta_*prey*predator;
  predator_death := -gamma_*predator;
  rhs_prey__mechanistic := prey_birth + prey_predation;
  rhs_prey__universal := 0 + prey__U__neural_network_nn1__layer_1__node__1;
  rhs_predator__mechanistic := predator_predation + predator_death;
  rhs_predator__universal := 0 + predator__U__neural_network_nn1__layer_1__node__0;
  neural_network_nn1__layer_0__node__0__formula__ := tanh(neural_network_nn1__layer_0__node__0__bias__ + neural_network_nn1__layer_0__node__0__weight__predator*predator + neural_network_nn1__layer_0__node__0__weight__prey*prey);
  neural_network_nn1__layer_0__node__1__formula__ := tanh(neural_network_nn1__layer_0__node__1__bias__ + neural_network_nn1__layer_0__node__1__weight__predator*predator + neural_network_nn1__layer_0__node__1__weight__prey*prey);
  neural_network_nn1__layer_1__node__0__formula__ := neural_network_nn1__layer_1__node__0__bias__ + neural_network_nn1__layer_1__node__0__weight__neural_network_nn1__layer_0__node__0*neural_network_nn1__layer_0__node__0__formula__ + neural_network_nn1__layer_1__node__0__weight__neural_network_nn1__layer_0__node__1*neural_network_nn1__layer_0__node__1__formula__;
  neural_network_nn1__layer_1__node__1__formula__ := neural_network_nn1__layer_1__node__1__bias__ + neural_network_nn1__layer_1__node__1__weight__neural_network_nn1__layer_0__node__0*neural_network_nn1__layer_0__node__0__formula__ + neural_network_nn1__layer_1__node__1__weight__neural_network_nn1__layer_0__node__1*neural_network_nn1__layer_0__node__1__formula__;
  predator__U__neural_network_nn1__layer_1__node__0 := tanh(10*predator)*(neural_network_nn1__layer_1__node__0__bias__ + neural_network_nn1__layer_1__node__0__weight__neural_network_nn1__layer_0__node__0*neural_network_nn1__layer_0__node__0__formula__ + neural_network_nn1__layer_1__node__0__weight__neural_network_nn1__layer_0__node__1*neural_network_nn1__layer_0__node__1__formula__);
  prey__U__neural_network_nn1__layer_1__node__1 := tanh(10*prey)*(neural_network_nn1__layer_1__node__1__bias__ + neural_network_nn1__layer_1__node__1__weight__neural_network_nn1__layer_0__node__0*neural_network_nn1__layer_0__node__0__formula__ + neural_network_nn1__layer_1__node__1__weight__neural_network_nn1__layer_0__node__1*neural_network_nn1__layer_0__node__1__formula__);
  nUDE_universal_magnitude := sqrt(rhs_prey__universal*rhs_prey__universal + rhs_predator__universal*rhs_predator__universal);

  // Rate rules:
  prey' = rhs_prey__mechanistic + rhs_prey__universal;
  predator' = rhs_predator__mechanistic + rhs_predator__universal;
  nUDE_universal_integral' = nUDE_universal_magnitude;
end
